f(x, y) := x - y + 1
# Eugene Chung
# 2A Mechatronics
# MTE 203
# Lab 1
g(x, y) := x + y + 2
h(x, y) := 2*x + 3*y + 3
# [component: inputs f, g, h]
x := 1
y := 1
z := 1
Given
f(x, y) == z
g(x, y) == z
h(x, y) == z
[x; y; z] := Find(x, y, z) → [0; -1/2; 3/2]
# Check solution:
f(x, y) = 1.5
g(x, y) = 1.5
h(x, y) = 1.5
b := [-1; -2; -3]
A := [1, -1, -1; 1, 1, -1; 2, 3, -1]
x := sol_1  # error: This variable is undefined.
sol := A^-1*b
y := sol_2  # error: This variable is undefined.
z := sol_3  # error: This variable is undefined.
sol = [0; -0.5; 1.5]
