ORIGIN := 1
f(x, y) := x*e^(-(x^2 + y^2))
# [component: inputs f]
f_x(x, y) := d/dx(f(x, y)) → e^(-x^2 - y^2) - 2*x^2*e^(-x^2 - y^2)
f_y(x, y) := d/dy(f(x, y)) → -2*x*y*e^(-x^2 - y^2)
Given
f_x(x, y) == 0
f_y(x, y) == 0
sol := transpose(Find(x, y)) → [sqrt(2)/2, 0; -sqrt(2)/2, 0]
n := rows(sol)
i := 1 .. n
n = 2
x := sol[:, 1]
y := sol[:, 2]
z[1] := f(x[1], y[1])
x[1] = 0.707107
x[2] = -0.707107
x = [0.707107; -0.707107]
y = [0; 0]
y[1] = 0
y[2] = 0
z = [0.428882]
z[1] = 0.428882
z[2] := f(x[2], y[2])
z[2] = -0.428882
f_xx(x, y) := d^2/dx^2(f(x, y)) → 4*x^3*e^(-x^2 - y^2) - 6*x*e^(-x^2 - y^2)
f_yy(x, y) := d^2/dy^2(f(x, y)) → 4*x*y^2*e^(-x^2 - y^2) - 2*x*e^(-x^2 - y^2)
f_xy(x, y) := d/dy(d/dx(f(x, y))) → 4*x^2*y*e^(-x^2 - y^2) - 2*y*e^(-x^2 - y^2)
A_1 := f_xx(x[1], y[1])
A_3 := f_xy(x[1], y[1])
A_2 := f_yy(x[1], y[1])
D_1 := A_1*A_2 - (A_3^2)
A_1 = -1.71553
D_1 = 1.47152
A_2 = -0.857764
A_3 = 0
# Since D1 is positive and A1 and A2 are both negative, the point (x1, y1, z1)=(0.707,0,0.429) is a Maximum
A_6 := f_xy(x[2], y[2])
A_4 := f_xx(x[2], y[2])
A_5 := f_yy(x[2], y[2])
D_2 := A_4*A_5 - (A_6^2)
A_4 = 1.71553
A_5 = 0.857764
D_2 = 1.47152
A_6 = 0
# Since D2 is positive and A4 and A5 are both positive, the point (x2, y2, z2)=(-0.707,0,-0.429) is a Minimum
