z_top2(x, y) := if(x^2 + y^2 ≤ 1, sqrt(1 - x^2 - y^2) + 2, 2)
z_icecream(x, y) :=
    sqrt(1 - x^2 - y^2) + 2 if x^2 + y^2 ≤ 1
    2 otherwise
z_bottom2(x, y) := if(x^2 + y^2 ≤ sqrt(2), sqrt(4*x^2 + 4*y^2), 2)
z_cone(x, y) :=
    sqrt(4*x^2 + 4*y^2) if 2*x^2 + 2*y^2 ≤ 2
    2 otherwise
# [component: inputs z_cone, z_icecream]
# [component: inputs z_bottom2, z_top2]
