z_icecream(x, y) :=
    sqrt(1 - x^2 - y^2) if x^2 + y^2 ≤ 1
    0 otherwise
z_cone(x, y) :=
    sqrt(4*x^2 + 4*y^2) - 2 if x^2 + y^2 ≤ 1
    0 otherwise
# [component: inputs z_icecream, z_cone]
z_cone(x, y) := -z_icecream(x, y)
# Intersection is a circle on the (x,y plane)
x := 1/sqrt(2)
y := 1/sqrt(2)  # constraint: R^2 less or equal to 1
H := 2
R := sqrt(x^2 + y^2)
# Volume of Icecream Cone | consider positive Volume ONLY
V(x, y, H) := 4/6*π*sqrt(x^2 + y^2)^3 + 1/3*π*H*(x^2 + y^2)
V(x, y, H) = 4.18879
V(R, H) := 4/6*π*R^3 + 1/3*(π*R^2*H)
V(R, H) = 4.18879
# Integral Methods
V_Cartesian(x, y, H) := integral(integral(integral(1, z = sqrt(4*x^2 + 4*y^2) - H .. sqrt(1 - x^2 - y^2)), y = -sqrt(1 - x^2) .. sqrt(1 - x^2)), x = -1 .. 1)
V_Cartesian(x, y, H) = 4.18879
V_Polar(R, H) := 2*integral(integral(integral(1, z = 2*R - H .. sqrt(1 - R))*R, R = 0 .. 1), θ = 0 .. π)
V_Polar(R, H) = 3.76991
# Mathcad 14 doesn't like magnitude calculations
# Ex
test1 := |sqrt(|-1|)|  # error: This value must be a matrix of scalar elements.
test1 =  # error: This variable is undefined.
V_Sph(R) := integral(integral(integral(ρ^2*sin(ϕ), ρ = 0 .. π/2), ϕ = 0 .. 2*π), θ = 0 .. R)
V_Sph(R) = 1.1241e-16
