ORIGIN := -1
ORIGIN := 1
f(x, y) := 0.037*x*(1 - y)^2*e^((-x^2 - y^2)/4)
# [component: inputs f]
f_x(x, y) := d/dx(f(x, y)) → 0.037*e^(-x^2/4 - y^2/4)*(y - 1)^2 + (-0.0185*x^2*e^(-x^2/4 - y^2/4)*(y - 1)^2)
Given
f_y(x, y) := d/dy(f(x, y)) → 0.037*x*e^(-x^2/4 - y^2/4)*(2*y - 2) + (-0.0185*x*y*e^(-x^2/4 - y^2/4)*(y - 1)^2)
f_x(x, y) == 0
f_y(x, y) == 0
sol := transpose(Find(x, y))  # error: No solution was found.
f_xx(x, y) := d^2/dx^2(f(x, y)) → 0.00925*x^3*e^(-x^2/4 - y^2/4)*(y - 1)^2 + (-0.037*x*e^(-x^2/4 - y^2/4)*(y - 1)^2) + (-0.0185*x*e^(-x^2/4 - y^2/4)*(y - 1)^2)
f_yy(x, y) := d^2/dy^2(f(x, y)) → 0.074*x*e^(-x^2/4 - y^2/4) + (-0.0185*x*e^(-x^2/4 - y^2/4)*(y - 1)^2) + (-0.037*x*y*e^(-x^2/4 - y^2/4)*(2*y - 2)) + 0.00925*x*y^2*e^(-x^2/4 - y^2/4)*(y - 1)^2
f_xy(x, y) := d/dx(d/dy(f(x, y))) → 0.037*e^(-x^2/4 - y^2/4)*(2*y - 2) + (-0.0185*x^2*e^(-x^2/4 - y^2/4)*(2*y - 2)) + (-0.0185*y*e^(-x^2/4 - y^2/4)*(y - 1)^2) + 0.00925*x^2*y*e^(-x^2/4 - y^2/4)*(y - 1)^2
f_yx(x, y) := d/dy(d/dx(f(x, y))) → 0.037*e^(-x^2/4 - y^2/4)*(2*y - 2) + (-0.0185*x^2*e^(-x^2/4 - y^2/4)*(2*y - 2)) + (-0.0185*y*e^(-x^2/4 - y^2/4)*(y - 1)^2) + 0.00925*x^2*y*e^(-x^2/4 - y^2/4)*(y - 1)^2
