ORIGIN := -1
ORIGIN := 1
f(x, y) := 0.037*x*(1 - y)^2*e^((-x^2 - y^2)/4) + 1
# p1 | p5
x_1 := sqrt(2)
x_5 := -5.9
y_1 := (-1 + sqrt(17))/(-2)
y_5 := 1
# p2 | p6
x_2 := sqrt(2)
x_6 := 5.9
y_2 := (-1 - sqrt(17))/(-2)
y_6 := 1
# p3 | p7
x_3 := -sqrt(2)
x_7 := 0
y_3 := (-1 + sqrt(17))/(-2)
y_7 := 1
p4
x_4 := -sqrt(2)
y_4 := (-1 - sqrt(17))/(-2)
# [component: inputs f]
f_x(x, y) := d/dx(f(x, y)) → 0.037*e^(-x^2/4 - y^2/4)*(y - 1)^2 + (-0.0185*x^2*e^(-x^2/4 - y^2/4)*(y - 1)^2)
Given
f_y(x, y) := d/dy(f(x, y)) → 0.037*x*e^(-x^2/4 - y^2/4)*(2*y - 2) + (-0.0185*x*y*e^(-x^2/4 - y^2/4)*(y - 1)^2)
f_xx(x, y) := d^2/dx^2(f(x, y)) → 0.00925*x^3*e^(-x^2/4 - y^2/4)*(y - 1)^2 + (-0.037*x*e^(-x^2/4 - y^2/4)*(y - 1)^2) + (-0.0185*x*e^(-x^2/4 - y^2/4)*(y - 1)^2)
f_yy(x, y) := d^2/dy^2(f(x, y)) → 0.074*x*e^(-x^2/4 - y^2/4) + (-0.0185*x*e^(-x^2/4 - y^2/4)*(y - 1)^2) + (-0.037*x*y*e^(-x^2/4 - y^2/4)*(2*y - 2)) + 0.00925*x*y^2*e^(-x^2/4 - y^2/4)*(y - 1)^2
f_xy(x, y) := d/dx(d/dy(f(x, y))) → 0.037*e^(-x^2/4 - y^2/4)*(2*y - 2) + (-0.0185*x^2*e^(-x^2/4 - y^2/4)*(2*y - 2)) + (-0.0185*y*e^(-x^2/4 - y^2/4)*(y - 1)^2) + 0.00925*x^2*y*e^(-x^2/4 - y^2/4)*(y - 1)^2
f_yx(x, y) := d/dy(d/dx(f(x, y))) → 0.037*e^(-x^2/4 - y^2/4)*(2*y - 2) + (-0.0185*x^2*e^(-x^2/4 - y^2/4)*(2*y - 2)) + (-0.0185*y*e^(-x^2/4 - y^2/4)*(y - 1)^2) + 0.00925*x^2*y*e^(-x^2/4 - y^2/4)*(y - 1)^2
# Exclude e^(-(x^2/4y^2/4)) as explained in Appendix A
f_xnew(x, y) := 0.037*(y - 1)^2 - 0.0185*x^2*(y - 1)^2
f_ynew(x, y) := 0.037*x*(2*y - 2) - 0.0185*x*y*(y - 1)^2
f_xnew(x, y) == 0
f_ynew(x, y) == 0  # This validates the points previously p1 to p7
sol := transpose(Find(x, y)) → [
    1.41421356237, 2.56155281281;
    1.41421356237, -1.56155281281;
    -1.41421356237, 2.56155281281;
    -1.41421356237, -1.56155281281;
    0, 1.0
]
p1
f(x_1, y_1) = 1.11319
f_xx(x_1, y_1) = -0.113194
f_xy(x_1, y_1) = -1.38778e-17
f_yy(x_1, y_1) = -0.0910995
p2
f(x_2, y_2) = 1.01501
f_xx(x_2, y_2) = -0.0150062
f_xy(x_2, y_2) = -1.73472e-18
f_yy(x_2, y_2) = -0.0198111
p3
f(x_3, y_3) = 0.886806
f_xx(x_3, y_3) = 0.113194
f_xy(x_3, y_3) = -1.38778e-17
f_yy(x_3, y_3) = 0.0910995
p4
f(x_4, y_4) = 0.984994
f_xx(x_4, y_4) = 0.0150062
f_xy(x_4, y_4) = -1.73472e-18
f_yy(x_4, y_4) = 0.0198111
p5
f(x_5, y_5) = 1
f_xx(x_5, y_5) = 0
f_xy(x_5, y_5) = 0
f_yy(x_5, y_5) = -5.65018e-5
p6
f(x_6, y_6) = 1
f_xx(x_6, y_6) = 0
f_xy(x_6, y_6) = 0
f_yy(x_6, y_6) = 5.65018e-5
p7
f(x_7, y_7) = 1
f_xx(x_7, y_7) =  # no stored result
f_xy(x_7, y_7) = 0
f_yy(x_7, y_7) = 0
# Part II b.
x_2b := 2
y_2b := -0.5
T_temp(x, y) := 0.6*x*y - 400*f(x, y)*(1 - f(x, y))
T_temp(x_2b, y_2b) = 23.7407
# [component: inputs T_temp]
# PARTII c)
# Partial deriviative of Temperature distribution wrt x
T_tempx(x, y) := d/dx(T_temp(x, y)) → 0.6*y + 0.037*e^(-x^2/4 - y^2/4)*(14.8*x*e^(-x^2/4 - y^2/4)*(y - 1)^2 + 400)*(y - 1)^2 + (-0.0185*x^2*e^(-x^2/4 - y^2/4)*(14.8*x*e^(-x^2/4 - y^2/4)*(y - 1)^2 + 400)*(y - 1)^2) + 0.037*x*e^(-x^2/4 - y^2/4)*(y - 1)^2*(14.8*e^(-x^2/4 - y^2/4)*(y - 1)^2 + (-7.4*x^2*e^(-x^2/4 - y^2/4)*(y - 1)^2))
# Partial deriviative of Temperature distribution wrt y
T_tempy(x, y) := d/dy(T_temp(x, y)) → 0.6*x + 0.037*x*e^(-x^2/4 - y^2/4)*(14.8*x*e^(-x^2/4 - y^2/4)*(2*y - 2) + (-7.4*x*y*e^(-x^2/4 - y^2/4)*(y - 1)^2))*(y - 1)^2 + 0.037*x*e^(-x^2/4 - y^2/4)*(14.8*x*e^(-x^2/4 - y^2/4)*(y - 1)^2 + 400)*(2*y - 2) + (-0.0185*x*y*e^(-x^2/4 - y^2/4)*(14.8*x*e^(-x^2/4 - y^2/4)*(y - 1)^2 + 400)*(y - 1)^2)
# The gradient is (Ttempx i + Ttempy j)
T_tempx(2, -0.5) = -13.1326
T_tempy(2, -0.5) = -26.6039
T_temp2(x, y, z) := 0.6*x*y - 400*z*(1 - z)
T_temp2x(x, y, z) := d/dx(T_temp2(x, y, z)) → 0.6*y
T_temp2y(x, y, z) := d/dy(T_temp2(x, y, z)) → 0.6*x
∇[v](T_temp) =  # error: This variable is undefined.
