ORIGIN := -1
ORIGIN := 1
f(x, y) := 0.037*x*(1 - y)^2*e^((-x^2 - y^2)/4) + 1
# p1 | p5
x_1 := sqrt(2)
x_5 := -5.9
y_1 := (-1 + sqrt(17))/(-2)
y_5 := 1
# p2 | p6
x_2 := sqrt(2)
x_6 := 5.9
y_2 := (-1 - sqrt(17))/(-2)
y_6 := 1
# p3 | p7
x_3 := -sqrt(2)
x_7 := 0
y_3 := (-1 + sqrt(17))/(-2)
y_7 := 1
p4
x_4 := -sqrt(2)
y_4 := (-1 - sqrt(17))/(-2)
# [component: inputs f]
f_x(x, y) := d/dx(f(x, y)) → 0.037*e^(-x^2/4 - y^2/4)*(y - 1)^2 + (-0.0185*x^2*e^(-x^2/4 - y^2/4)*(y - 1)^2)
Given
f_y(x, y) := d/dy(f(x, y)) → 0.037*x*e^(-x^2/4 - y^2/4)*(2*y - 2) + (-0.0185*x*y*e^(-x^2/4 - y^2/4)*(y - 1)^2)
f_xx(x, y) := d^2/dx^2(f(x, y)) → 0.00925*x^3*e^(-x^2/4 - y^2/4)*(y - 1)^2 + (-0.037*x*e^(-x^2/4 - y^2/4)*(y - 1)^2) + (-0.0185*x*e^(-x^2/4 - y^2/4)*(y - 1)^2)
f_yy(x, y) := d^2/dy^2(f(x, y)) → 0.074*x*e^(-x^2/4 - y^2/4) + (-0.0185*x*e^(-x^2/4 - y^2/4)*(y - 1)^2) + (-0.037*x*y*e^(-x^2/4 - y^2/4)*(2*y - 2)) + 0.00925*x*y^2*e^(-x^2/4 - y^2/4)*(y - 1)^2
f_xy(x, y) := d/dx(d/dy(f(x, y))) → 0.037*e^(-x^2/4 - y^2/4)*(2*y - 2) + (-0.0185*x^2*e^(-x^2/4 - y^2/4)*(2*y - 2)) + (-0.0185*y*e^(-x^2/4 - y^2/4)*(y - 1)^2) + 0.00925*x^2*y*e^(-x^2/4 - y^2/4)*(y - 1)^2
f_yx(x, y) := d/dy(d/dx(f(x, y))) → 0.037*e^(-x^2/4 - y^2/4)*(2*y - 2) + (-0.0185*x^2*e^(-x^2/4 - y^2/4)*(2*y - 2)) + (-0.0185*y*e^(-x^2/4 - y^2/4)*(y - 1)^2) + 0.00925*x^2*y*e^(-x^2/4 - y^2/4)*(y - 1)^2
# Exclude e^(-(x^2/4y^2/4)) as explained in Appendix A
f_xnew(x, y) := 0.037*(y - 1)^2 - 0.0185*x^2*(y - 1)^2
f_ynew(x, y) := 0.037*x*(2*y - 2) - 0.0185*x*y*(y - 1)^2
f_xnew(x, y) == 0
f_ynew(x, y) == 0  # This validates the points previously p1 to p7
sol := transpose(Find(x, y)) → [
    1.41421356237, 2.56155281281;
    1.41421356237, -1.56155281281;
    -1.41421356237, 2.56155281281;
    -1.41421356237, -1.56155281281;
    0, 1.0
]
p1
f(x_1, y_1) = 1.11319
f_xx(x_1, y_1) = -0.113194
f_xy(x_1, y_1) = -1.38778e-17
f_yy(x_1, y_1) = -0.0910995
p2
f(x_2, y_2) = 1.01501
f_xx(x_2, y_2) = -0.0150062
f_xy(x_2, y_2) = -1.73472e-18
f_yy(x_2, y_2) = -0.0198111
p3
f(x_3, y_3) = 0.886806
f_xx(x_3, y_3) = 0.113194
f_xy(x_3, y_3) = -1.38778e-17
f_yy(x_3, y_3) = 0.0910995
p4
f(x_4, y_4) = 0.984994
f_xx(x_4, y_4) = 0.0150062
f_xy(x_4, y_4) = -1.73472e-18
f_yy(x_4, y_4) = 0.0198111
p5
f(x_5, y_5) = 1
f_xx(x_5, y_5) = 0
f_xy(x_5, y_5) = 0
f_yy(x_5, y_5) = -5.65018e-5
p6
f(x_6, y_6) = 1
f_xx(x_6, y_6) = 0
f_xy(x_6, y_6) = 0
f_yy(x_6, y_6) = 5.65018e-5
p7
f(x_7, y_7) = 1
f_xx(x_7, y_7) = 0
f_xy(x_7, y_7) = 0
f_yy(x_7, y_7) = 0
# APPENDIX C | Eugene Chung
# PART 3 - Lagrange Multipliers
# Let g(x,y,z) = 0 = z - 1 - 0.037x(1-y)^2*exp(-x^2/4-y^2/4)
# We define the Lagrangian
# L(x,y,z,λ)=T(x,y,z) + λ(g(x,y,z))
# The critical points can be determined as follows:
d/dx(L) = 0.6*x + λ(0.037*(1 - y)^2*e^(-x^2/4 - y^2/4)*(1 - x^2/2)) = 0  # disabled  # equation 1
d/dy(L) = 0.6*y + λ((0.074*x(y - 1)*e^(-x^2/4 - y^2/4)) - (0.0185*xy(1 - y)^2*e^(-x^2/4 - y^2/4))) = 0  # disabled
# equation 2
d/dz(L) = -400 + 800*z + λ(1) = 0  # disabled  # equation 3
d/dλ(L) = -0.037*x*(1 - y)^2*e^(-x^2/4 - y^2/4) - 1  # disabled  # equation 4
# Rearrange equation 3 & 4 to obtain equations A and B respectively
λ := 400 - 800*z  # disabled  # equation A
dL2_x(x, y) := 0.6*x + ((400 - 29.6*x*(1 - y)^2*e^(-x^2/4 - y^2/4))*(0.037*(1 - y)^2*e^(-x^2/4 - y^2/4)*(1 - x^2/2)))
z := 0.037*x*(1 - y)^2*e^(-x^2/4 - y^2/4) + 1  # disabled  # equation B
dL2_y(x, y) := 0.6*y + (400 - 29.6*x*(1 - y)^2*e^(-x^2/4 - y^2/4))*((0.074*x*(y - 1)*e^(-x^2/4 - y^2/4)) - (0.0185*(x*y*(1 - y)^2)*e^(-x^2/4 - y^2/4)))
# Sub B equation into A equation
# equation C
λ(x, y) := 1200 - 29.6*x*(1 - y)^2*e^(-x^2/4 - y^2/4)
# Sub C into equations 1 & 2 to obtain equations E1 and E2 respectively
dLy(x, y) := 0.6*y + (1200 - 29.6*x*(1 - y)^2*e^(-x^2/4 - y^2/4))*((0.074*x*(y - 1)*e^(-x^2/4 - y^2/4)) - (0.0185*(x*y*(1 - y)^2)*e^(-x^2/4 - y^2/4)))
dLx(x, y) := 0.6*x + ((1200 - 29.6*x*(1 - y)^2*e^(-x^2/4 - y^2/4))*(0.037*(1 - y)^2*e^(-x^2/4 - y^2/4)*(1 - x^2/2)))
dLx == 0  # disabled
# equation E1
dLy(x, y) := 0.6*y + (1200 - 29.6*x*(1 - y)^2*e^(-x^2/4 - y^2/4))*(0.074*x*(y - 1)*e^(-x^2/4 - y^2/4))  # disabled
-|0.0185*(x*y*(1 - y)^2)*e^(-x^2/4 - y^2/4)|
dLy == 0  # disabled  # equation E2
# CASE I: x=0
# note that e^(-y^2/4) > 0, e^(-x^2/4) > 0, e^(-x^2/4 - y^2/4) > 0*always
# Sub x=0, into equation E1 & E2
0 = 1200*(0.037*(1 - y)^2*e^(-y^2/4))  # disabled
0 = 0.6*y  # disabled
# Using approximations and other tools.
y := 0.0112613*(88.8 + (-1))  # disabled
y1 := 0.9887  # disabled
y2 := 1.01239
# Therefore y3=0 satisfies both equations | The point (0,0) will be P#10
# CASE II: y=0
# Sub y=0 into equation E1 & E2
# sub y=0 into E1
0 = 0.6*x + ((1200 - 29.6*x*e^(-x^2/4))*((0.037 - 0.0185*x^2)*e^(-x^2/4)))  # disabled
0 = -29.6*e^(-x^2/2)*x(0.037 - 0.0185*x^2) + 0.6*x + 1200  # disabled
# Using approximation methods and other tools
# x is approximately equal -2000
# sub y=0 into E2
0 = (-88.8*x + 2.1904*x^2)*e^(-x^2/4)  # disabled
# Therefore x = 0 or x = -40.54
x1 := 1.1
x2 := 1.1
yx1 := -1.56155281
# CASE III y = -1.56155281
E7(x1) := dLx(x1, -1.56155281) → 0.6*x1 + 0.242777453541*e^(-x1^2/4 - 0.609611794605)*(194.221962833*x1*e^(-x1^2/4 - 0.609611794605) - 1200)*(x1^2/2 - 1)
E8(x2) := dLy(x2, -1.56155281) → 5.48813770902e-10*x2*e^(-x2^2/4 - 0.609611794605)*(194.221962833*x2*e^(-x2^2/4 - 0.609611794605) - 1200) - 0.936931686
E7(x1) == 0
E8(x2) == 0
# E7 has three solutions
x := -1.40823  # disabled
x := 1.42074
x := 5.06926
# E8 has the solution -0.9369
x = -0.9369  # disabled
E9(x3) := dLx(x3, 2.5615528) → 0.6*x3 + 0.090222544446*e^(-x3^2/4 - 1.6403881868)*(72.1780355568*x3*e^(-x3^2/4 - 1.6403881868) - 1200)*(x3^2/2 - 1)
# CASE IV: y = 2.5615528
E10(x4) := dLy(x4, 2.5615528) → -1.52567606196e-9*x4*e^(-x4^2/4 - 1.6403881868)*(72.1780355568*x4*e^(-x4^2/4 - 1.6403881868) - 1200) + 1.53693168
TT2(x, y) := 0.6*x*y - 400*(0.037*x*(1 - y)^2*e^((-x^2 - y^2)/4))*(1 - (0.037*x*(1 - y)^2*e^((-x^2 - y^2)/4)))
# Partial derivatives are too long to display all of it
TT2_x(x, y) := d/dx(TT2(x, y)) → 0.6*y + 14.8*e^(-x^2/4 - y^2/4)*(0.037*x*e^(-x^2/4 - y^2/4)*(y - 1)^2 - 1)*(y - 1)^2 + (-7.4*x^2*e^(-x^2/4 - y^2/4)*(0.037*x*e^(-x^2/4 - y^2/4)*(y - 1)^2 - 1)*(y - 1)^2) + 14.8*x*e^(-x^2/4 - y^2/4)*(0.037*e^(-x^2/4 - y^2/4)*(y - 1)^2 + (-0.0185*x^2*e^(-x^2/4 - y^2/4)*(y - 1)^2))*(y - 1)^2
TT2_y(x, y) := d/dy(TT2(x, y)) → 0.6*x + 14.8*x*e^(-x^2/4 - y^2/4)*(y - 1)^2*(0.037*x*e^(-x^2/4 - y^2/4)*(2*y - 2) + (-0.0185*x*y*e^(-x^2/4 - y^2/4)*(y - 1)^2)) + 14.8*x*e^(-x^2/4 - y^2/4)*(0.037*x*e^(-x^2/4 - y^2/4)*(y - 1)^2 - 1)*(2*y - 2) + (-7.4*x*y*e^(-x^2/4 - y^2/4)*(0.037*x*e^(-x^2/4 - y^2/4)*(y - 1)^2 - 1)*(y - 1)^2)
TT2_xx(x, y) := d^2/dx^2(TT2(x, y)) → 29.6*e^(-x^2/4 - y^2/4)*(0.037*e^(-x^2/4 - y^2/4)*(y - 1)^2 + (-0.0185*x^2*e^(-x^2/4 - y^2/4)*(y - 1)^2))*(y - 1)^2 + 3.7*x^3*e^(-x^2/4 - y^2/4)*(0.037*x*e^(-x^2/4 - y^2/4)*(y - 1)^2 - 1)*(y - 1)^2 + (-14.8*x^2*e^(-x^2/4 - y^2/4)*(0.037*e^(-x^2/4 - y^2/4)*(y - 1)^2 + (-0.0185*x^2*e^(-x^2/4 - y^2/4)*(y - 1)^2))*(y - 1)^2) + 14.8*x*e^(-x^2/4 - y^2/4)*(y - 1)^2*(-0.0555*x*e^(-x^2/4 - y^2/4)*(y - 1)^2 + 0.00925*x^3*e^(-x^2/4 - y^2/4)*(y - 1)^2) + (-14.8*x*e^(-x^2/4 - y^2/4)*(0.037*x*e^(-x^2/4 - y^2/4)*(y - 1)^2 - 1)*(y - 1)^2) + (-7.4*x*e^(-x^2/4 - y^2/4)*(0.037*x*e^(-x^2/4 - y^2/4)*(y - 1)^2 - 1)*(y - 1)^2)
p8
TT2_yy(x, y) := d^2/dy^2(TT2(x, y)) → 29.6*x*e^(-x^2/4 - y^2/4)*(0.037*x*e^(-x^2/4 - y^2/4)*(y - 1)^2 - 1) + 14.8*x*e^(-x^2/4 - y^2/4)*(y - 1)^2*(0.074*x*e^(-x^2/4 - y^2/4) + (-0.0185*x*e^(-x^2/4 - y^2/4)*(y - 1)^2) + (-0.037*x*y*e^(-x^2/4 - y^2/4)*(2*y - 2)) + 0.00925*x*y^2*e^(-x^2/4 - y^2/4)*(y - 1)^2) + 29.6*x*e^(-x^2/4 - y^2/4)*(0.037*x*e^(-x^2/4 - y^2/4)*(2*y - 2) + (-0.0185*x*y*e^(-x^2/4 - y^2/4)*(y - 1)^2))*(2*y - 2) + (-7.4*x*e^(-x^2/4 - y^2/4)*(0.037*x*e^(-x^2/4 - y^2/4)*(y - 1)^2 - 1)*(y - 1)^2) + (-14.8*x*y*e^(-x^2/4 - y^2/4)*(0.037*x*e^(-x^2/4 - y^2/4)*(y - 1)^2 - 1)*(2*y - 2)) + 3.7*x*y^2*e^(-x^2/4 - y^2/4)*(0.037*x*e^(-x^2/4 - y^2/4)*(y - 1)^2 - 1)*(y - 1)^2 + (-14.8*x*y*e^(-x^2/4 - y^2/4)*(y - 1)^2*(0.037*x*e^(-x^2/4 - y^2/4)*(2*y - 2) + (-0.0185*x*y*e^(-x^2/4 - y^2/4)*(y - 1)^2)))
TT2_xy(x, y) := d/dy(d/dx(TT2(x, y)))  # error: The symbolic result returned is too large to display, but it can be used in subsequent calculations if assigned to a function or variable.
p8  # fuction is too long
# p9 | pzero
x_8 := 0
x_9 := 0
x_zero := 0
y_8 := 0.9887
y_9 := 1.01239
y_zero := 0
Crit(x, y) := TT2_xy(x, y)*TT2_xy(x, y) - TT2_xx(x, y)*TT2_yy(x, y)
# p9 | pzero
f(x_9, y_9) = 1
f(x_zero, y_zero) = 1
f(x_8, y_8) = 1
TT2_xx(x_zero, y_zero) = 1.0952
TT2_xx(x_9, y_9) = 1.54603e-8
TT2_xx(x_8, y_8) = 1.09532e-8
TT2_xy(x_zero, y_zero) = 30.2
TT2_xy(x_9, y_9) = 0.317044
TT2_xy(x_8, y_8) = 0.862693
TT2_yy(x_9, y_9) = 0
TT2_yy(x_zero, y_zero) = 0
TT2_yy(x_8, y_8) = 0
TT2(x_zero, y_zero) = 0
TT2(x_9, y_9) = 0
TT2(x_8, y_8) = 0
Crit(x_zero, y_zero) = 912.04
Crit(x_8, y_8) = 0.744238
Crit(x_9, y_9) = 0.100517
dLx(x_zero*y_zero) = ƒ(Unitless) → Unitless
dLx(x_8, x_8) = 44.4
dLx(x_9, y_9) = 0.00527527
dLy(x_zero, y_zero) = 0
dLy(x_8, y_8) = 0.59322
dLy(x_9, y_9) = 0.607434
Crit(x_1, y_1) = -987.071
Crit(x_2, y_2) = -44.3941
Crit(x_3, y_3) = -2481.16
TT2_xx(x_3, y_3) = -55.5282
TT2_xy(x_3, y_3) = 0.6
TT2_yy(x_3, y_3) = -44.6894
Crit(x_4, y_4) = -50.1044
# Matching Temperatures for all the critical points in the project
TT2(x_1, y_1) = -41.4776
TT2(x_2, y_2) = -3.73886
TT2(x_3, y_3) = 51.728
TT2(x_4, y_4) = 3.91901
TT2(x_5, y_5) = -3.54
TT2(x_6, y_6) = 3.54
TT2(x_7, y_7) = 0
TT2(x_8, y_8) = 0
# [component: inputs TT2]
# [component: inputs f]
# [component: inputs TT2]
x_11 := -1.408
y_11 := 1.5615
x_12 := 1.4207
y_12 := 1.5615
x_13 := 5.06926
y_13 := 1.5615
x_14 := 1.99
y_14 := 2.561
x_15 := 1.537
y_15 := 2.561
f(x_11, y_11) = 0.994561
f(x_12, y_12) = 1.00544
TT2_xx(x_11, y_11) = -2.20895
TT2_xx(x_12, y_12) = 2.14208
TT2_xy(x_11, y_11) = 0.5615
TT2_xy(x_12, y_12) = 0.638306
TT2_yy(x_11, y_11) = 2.14309
TT2_yy(x_12, y_12) = -1.73479
TT2(x_11, y_11) = 0.868321
TT2(x_12, y_12) = -0.832751
Crit(x_11, y_11) = 5.04927
Crit(x_12, y_12) = 4.12349
dLx(x_11*y_11) = ƒ(Unitless) → Unitless
dLx(x_12*y_12) = ƒ(Unitless) → Unitless
TT2(x_11, y_11) = 0.868321
dLy(x_11, y_11) = -17.2812
dLy(x_12, y_12) = 19.0233
TT2(x_12, y_12) = -0.832751
f(x_13, y_13) = 1.00005
TT2(x_13, y_13) = 4.72854
f(x_14, y_14) = 1.01294
TT2_xx(x_13, y_13) = -0.102652
TT2(x_14, y_14) = -2.04956
TT2_xx(x_14, y_14) = 2.60298
TT2_xy(x_13, y_13) = 0.73551
TT2(x_15, y_15) = -3.50811
TT2_xy(x_14, y_14) = 0.601764
TT2_yy(x_13, y_13) = -0.0185632
TT2_yy(x_14, y_14) = 6.65731
TT2(x_13, y_13) = 4.72854
TT2(x_14, y_14) = -2.04956
Crit(x_13, y_13) = 0.539069
Crit(x_14, y_14) = -16.9667
dLx(x_13*y_13) = ƒ(Unitless) → Unitless
dLx(x_14*y_14) = ƒ(Unitless) → Unitless
dLy(x_13, y_13) = 1.11086
dLy(x_14, y_14) = 1.54783
f(x_15, y_15) = 1.0149
TT2_xx(x_15, y_15) = 5.25985
TT2_xy(x_15, y_15) = 0.600482
TT2_yy(x_15, y_15) = 7.63553
TT2(x_15, y_15) = -3.50811
Crit(x_15, y_15) = -39.8012
dLx(x_15*y_15) = ƒ(Unitless) → Unitless
dLy(x_15, y_15) = 1.54952
