# MTE 203 - ADVANCED CALCULUS | Equation of shell in x-z planer
# CASE 1 | CASE 2
a_1 := 0.3
a_2 := 0.300
(x/a)^2 + (z/b)^2 := 1  # disabled  # Equation A
b_1 := 0.250
b_2 := 0.500
L_1 := 0.800
L_2 := 1.500  # Equation of tube in y-z plane
d_1 := 0.070
d_2 := 0.050
# In meteres
(y/(d/2))^2 + (z/(d/2))^2 := 1  # disabled  # Equation B
# PART A
SHELL_t(x, z) :=
    0 if |x| > |a_1|
    b_1*sqrt(1 - (x/a_1)^2) otherwise  # I used absolute values to restrict both sides of the plot
TUBE_t(y, z) :=
    0 if |z| > |d_1/2|
    sqrt((d_1/2)^2 - z^2) otherwise
# There will be 3 more tubes, 4 in total
# But I felt one is enough to demonstrate because they have the same volume and dimensions
SHELL_b(x, z) := -SHELL_t(x, z)
TUBE_b(y, x) := -TUBE_t(y, x)
# [component: inputs SHELL_b, SHELL_t, TUBE_b, TUBE_t]
# PART B: Cylindrical Coordinates
x := r*cos(θ)  # disabled
# Volume of Shell
z := r*sin(θ)  # disabled
y := y  # disabled
# Sub into Equation A
(r*cosθ/a)^2 + (r*sin(θ)/b)^2  # disabled
# This is used in the
# cylindrical integration
b^2*r^2*cos(θ)^2 + a^2*r^2*sin(θ)^2 := a^2*b^2  # disabled
r_Shell1(θ) := a_1*b_1/sqrt(a_1^2*sin(θ)^2 + b_1^2*cos(θ)^2)
r_Shell2(θ) := a_2*b_2/sqrt(a_2^2*sin(θ)^2 + b_2^2*cos(θ)^2)
# If we only consider 1/4 of the cylinder on the positive x,y,z octant, we get the following intergral
V_SHELL1(a_1, b_1, L_1) := 4*integral(integral(integral(1, y = 0 .. L_1)*r_Shell1, r_Shell1 = 0 .. r_Shell1(θ)), θ = 0 .. π/2)
# Assume Shell enters from g1(r,θ)=0 and exits g2(r,θ)=L
# The radius is wrt a,b and θ
# θ goes from 0 to π/2 on the x-z axis which is a quarter turn.
V_SHELL1(a_1, b_1, L_1) = 0.188496
# Volume of Tube
y := r*cos(θ)  # disabled
z := r*sin(θ)  # disabled
# Assume the TUBE enters from g1(r,θ)=0 and exits g2(r,θ)=2a
# The radius is wrt a,b and θ
# θ goes from 0 to π/2 on the y-z axis which is a quarter turn.
x := x  # disabled
# Sub into Equation B
(r*cos(θ))^2 + (r*sin(θ))^2 := (d/2)^2  # disabled
r_Tube1(θ) := (d_1/2)/sqrt(cos(θ)^2 + sin(θ)^2)
r_Tube2(θ) := (d_2/2)/sqrt(cos(θ)^2 + sin(θ)^2)
V_TUBE1(a_1, b_1, L_1) := 4*integral(integral(integral(1, x = 0 .. 2*a_1)*r_Tube1, r_Tube1 = 0 .. r_Tube1(θ)), θ = 0 .. π/2)
V_TUBE1(a_1, b_1, L_1) = 0.00230907
# Volume of CAP
# The cap will be facing the same direction of the tube. However, g1(r,θ) will not be zero this time, but rather equals to r.tube.  This is where it enters.  It exits through g2(r,θ) which is r.shell
y := r*cos(θ)  # disabled
z := r*sin(θ)  # disabled
x := x  # disabled
# If you the cap is placed on the zero y-z plane, the cap will appear in octants 2,4,6,8 in symmetry.  We perform calculations on the 2nd octant and split the volume of the cap into 4 equal parts by octants 2,4,6,8
# -The trick here is that the most inner integral for g1 and g2 is changed because the shape enters from r.tube and exits through partially the shape of r.shell
# -From observation and calcuation the r.Shell equation will have to be modified to r ShellMod below - basically the z-axis will no longer move in the full range of b but in the range of the radius 'd/2'
# -The radius of the cap is the same as the radius of the tube
# -alpha goes from 0 degrees to beta, π/2
r_ShellMod1(θ) := a_1*d_1/2/sqrt(a_1^2*sin(θ)^2 + (d_1/2)^2*cos(θ)^2)
V_CAP1(a_1, b_1, L_1) := 4*integral(integral(integral(1, x = r_Tube1(θ) .. r_ShellMod1(θ))*r_1, r_1 = 0 .. r_Tube1(θ)), θ = 0 .. π/2)
V_CAP1(a_1, b_1, L_1) = 0.000169152
V_total1 := V_SHELL1(a_1, b_1, L_1) - 4*V_TUBE1(a_1, b_1, L_1) + 8*V_CAP1(a_1, b_1, L_1)
V_total1 = 0.180612  # This is the answer for Case 1 in mm^3
# Similarly for CASE 2
V_SHELL2(a_2, b_2, L_2) := 4*integral(integral(integral(1, y = 0 .. L_2)*r_Shell2, r_Shell2 = 0 .. r_Shell2(θ)), θ = 0 .. π/2)
V_SHELL2(a_2, b_2, L_2) = 0.706858
V_TUBE2(a_2, b_2, L_2) := 4*integral(integral(integral(1, x = 0 .. 2*a_2)*r_Tube2, r_Tube2 = 0 .. r_Tube2(θ)), θ = 0 .. π/2)
V_TUBE2(a_2, b_2, L_2) = 0.0011781
r_ShellMod2(θ) := a_2*d_2/2/sqrt(a_2^2*sin(θ)^2 + (d_2/2)^2*cos(θ)^2)
V_CAP2(a_2, b_2, L_2) := 4*integral(integral(integral(1, x = r_Tube2(θ) .. r_ShellMod2(θ))*r_2, r_2 = 0 .. r_Tube2(θ)), θ = 0 .. π/2)
V_CAP2(a_2, b_2, L_2) = 7.2044e-5
V_total2 := V_SHELL2(a_2, b_2, L_2) - 4*V_TUBE2(a_2, b_2, L_2) + 8*V_CAP2(a_2, b_2, L_2)
V_total2 = 0.702722  # note: I didnt put d explicitly in the parameters because it was declared as a constant at the top of the file
